*HEADING
Stage 1 sample_001: single Abaqus S4 shell element
*NODE
1, 0.0, 0.0, 0.0
2, 1.0, 0.0, 0.0
3, 1.0, 1.0, 0.0
4, 0.0, 1.0, 0.0
*ELEMENT, TYPE=S4, ELSET=EALL
1, 1, 2, 3, 4
*MATERIAL, NAME=STEEL
*ELASTIC
210000000000.0, 0.3
*SHELL SECTION, ELSET=EALL, MATERIAL=STEEL
0.01
*STEP
*STATIC
*END STEP
